# OpenSim document version 40000
# Own
XsensDataReaderSettings:
  trial_prefix: Shooting
  ExperimentalSensors:
    ExperimentalSensor _PELVIS: name_in_model=pelvis_imu
    ExperimentalSensor _HUMERUS: name_in_model=humerus_r_imu
    ExperimentalSensor _TORSO: name_in_model=torso_imu
    ExperimentalSensor _ULNA: name_in_model=ulna_r_imu
